//Generated by Ashley Bruce 25/01/13

module climate;
class climate {
	double elevation[m];
	double tzoffset[h];
}
object csv_reader{
	name CsvReader;
	filename "climate/ElermorevaleClimate.csv";
}
object climate {
	name "ElermoreClimate";
	tmyfile "climate/ElermorevaleClimate.csv";
	reader CsvReader;
	tzoffset 0;
	elevation 9;
}
